// SBML level 3 version 2
// Created with https://github.com/matthiaskoenig/sbmlutils.

model caffeine_pk()
  // Caffeine pharmacokinetics model
  // Model of absorption and distribution of caffeine.
  // Simple two-compartment pharmacokinetics model for caffeine.
  // Terms of use
  // The content of this model has been carefully created in a manual research effort. This file has been created by Matthias König using sbmlutils. For questions contact koenigmx@hu-berlin.de. Copyright © 2023 Matthias König.
  // This work is licensed under a Creative Commons Attribution 4.0 International License.
  // Redistribution and use of any part of this model, with or without modification, are permitted provided that the following conditions are met:
  // Redistributions of this SBML file must retain the above copyright notice, this list of conditions and the following disclaimer.
  // Redistributions in a different form must reproduce the above copyright notice, this list of conditions and the following disclaimer in the documentation and/or other materials provided with the distribution.
  // This model is distributed in the hope that it will be useful, but WITHOUT ANY WARRANTY; without even the implied warranty of MERCHANTABILITY or FITNESS FOR A PARTICULAR PURPOSE.
  // snomed:447612001 ncit:C45247 taxon:10090
  // model units - substance: mmole, time: min, volume: litre, area: m2, length: metre, extent: mmole

  // Compartments:
  compartment Vgut = 1 litre; Vgut is "gut compartment";  // SBO:0000290
  compartment Vperi = 1 litre; Vperi is "peripheral compartment";  // SBO:0000290
  compartment Vcent = 1 litre; Vcent is "central compartment";  // SBO:0000290

  // Species:
  // handled in amount not concentration
  species caf_gut in Vgut = 1/Vgut; caf_gut is "caffeine gut";  // SBO:0000247 CHEBI:27732 ncit:C328
  species caf_cent in Vcent = 0; caf_cent is "caffeine plasma";  // SBO:0000247 CHEBI:27732 ncit:C328
  species caf_peri in Vperi = 0; caf_peri is "caffeine peripheral";  // SBO:0000247 CHEBI:27732 ncit:C328

  // Parameters:
  Mr_caf = 100 g_per_mole; Mr_caf is "molecular weight caffeine";  // SBO:0000647
  conc_conversion = 1000 ng_per_mug; conc_conversion is "conversion factor [µg/ml] -> [ng/ml]";
  caf_plasma has ng_per_ml; caf_plasma is "caffeine plasma [ng/ml]";  // CHEBI:27732 ncit:C328
  k_absorption = 0.01 l_per_min; k_absorption is "absorption rate";  // SBO:0000009
  CL = 1 l_per_min; CL is "clearance caffeine";  // SBO:0000009
  Q = 1 l_per_min; Q is "distribution Q";  // SBO:0000009

  // Assignment rules:
  caf_plasma := caf_cent*Mr_caf*conc_conversion;

  // Reactions:
  // [mmole/min] absorption from gut
  ABSORPTION: caf_gut => caf_cent; k_absorption*caf_gut; ABSORPTION is "absorption caffeine";  // SBO:0000176
  // [mmole/min] clearance from central compartment
  CLEARANCE: caf_cent => ; CL*caf_cent; CLEARANCE is "clearance caffeine";  // SBO:0000176
  // [mmole/min] distribution in peripheral compartment
  transport_peripheral_R1: caf_cent => caf_peri; Q*caf_cent; transport_peripheral_R1 is "transport peripheral (R1)";  // SBO:0000176
  // [mmole/min] distribution from peripheral compartment
  transport_central_R2: caf_peri => caf_cent; Q*caf_peri; transport_central_R2 is "transport central (R2)";  // SBO:0000176

  // Unit definitions:
  unit g_per_mole = gram / mole; g_per_mole is "g/mole";
  unit l_per_min = litre / (60 second); l_per_min is "l/min";
  unit l_per_min_mmole = litre / (60 second * 1e-3 mole); l_per_min_mmole is "l/min/mmole";
  unit m2 = metre^2; m2 is "meter^2";
  unit mM = 1e-3 mole / litre; mM is "mmole/liter";
  unit mg = 1e-3 gram;
  unit min = 60 second;
  unit mmole = 1e-3 mole;
  unit mmole_per_min = 1e-3 mole / (60 second); mmole_per_min is "mmole/min";
  unit mmole_per_min_l = 1e-3 mole / (60 second * litre); mmole_per_min_l is "mmole/min/liter";
  unit mug = 1e-6 gram; mug is "µg";
  unit ng_per_ml = 1e-3 gram / (1e-3 litre); ng_per_ml is "mg/ml";
  unit ng_per_mug = 1e-9 gram / (1e-6 gram); ng_per_mug is "ng/µg";
  unit per_min = 1 / (60 second); per_min is "1/min";
  unit per_min_l = 1 / (60 second * litre); per_min_l is "1/min/liter";
end
